**  BEGIN USER HEADER
**  ABAQUS INPUT FILE: Healthy_QuasiStatic.inp
**  FILE CREATED ON: 18-Jan-2024 16:41:41 USING Write_Abaqus_File.m
**  FILE CREATED BY: ch49693
**  STUDY NUMBER: 9
**  ITERATION: 298
**  MESH FILE: OCS13_mesh_fine.inp
**  END OF USER HEADER
**
**  BEGIN MODEL DATA
*PART, NAME=Leaflet
*NODE, NSET=Leaflet_Nodes
1,-8.164562e+00,8.880193e+00,1.297155e+00
2,-1.406807e+01,-8.320672e+00,3.710270e-01
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*NODE, NSET=Chordae_Nodes
8588,-1.406807e+01,-8.320672e+00,-2.535352e+01
8589,-1.407327e+01,-8.662652e+00,-2.322602e+01
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*ELEMENT, TYPE=S4R, ELSET=Anterior_Leaflet_Elements
1,72,1652,1852,172
2,1652,1653,1853,1852
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*ELEMENT, TYPE=S4R, ELSET=Septal_Leaflet_Elements
5042,6879,50,71,6880
5043,6878,6879,6880,6881
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*ELEMENT, TYPE=S4R, ELSET=Posterior_Leaflet_Elements
6851,50,73,173,71
6852,71,173,174,70
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*ELEMENT, TYPE=T3D2, ELSET=Chordae_Elements
8284, 8588, 8589
8285, 8589, 8590
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*NSET, NSET=Annular_Nodes
1,2,3,4,5,6
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*NSET, NSET=Free_Edge_Nodes
50,72,73,74,75,76
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*ELSET, ELSET=Posterior_Chordae
8284,8285,8286,8287,8288,8289
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
*ELSET, ELSET=Septal_Chordae
8293,8294,8295,8296,8297,8298
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*ELSET, ELSET=Anterior_Chordae
8302,8303,8304,8305,8306,8307
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*ELSET, ELSET=LEAFLET_ELEMENTS
Septal_Leaflet_Elements, Posterior_Leaflet_Elements, Anterior_Leaflet_Elements

*Distribution, name=Ori-1-DiscOrient, location=ELEMENT, Table=Ori-1-DiscOrient_Table
,           1.,           0.,           0.,           0.,           1.,           0.
6851,0.785745,0.618550,-0.000000,0.000000,0.000000,1.000000
6852,0.782784,0.622293,-0.000000,0.000000,0.000000,1.000000
6853,0.746935,0.664897,-0.000000,0.000000,0.000000,1.000000
6854,0.747448,0.664320,-0.000000,0.000000,0.000000,1.000000
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8283,0.105355,0.994435,-0.000000,0.000000,0.000000,1.000000
*Orientation, name=Ori-1, system=RECTANGULAR, local directions=1
Ori-1-DiscOrient
3, 0.
1.000000,0.000000,0.0
*Distribution, name=Ori-2-DiscOrient, location=ELEMENT, Table=Ori-2-DiscOrient_Table
,           1.,           0.,           0.,           0.,           1.,           0.
1,-0.379669,0.925122,-0.000000,0.000000,0.000000,1.000000
2,-0.419040,0.907968,-0.000000,0.000000,0.000000,1.000000
3,-0.452477,0.891776,-0.000000,0.000000,0.000000,1.000000
4,-0.484917,0.874560,-0.000000,0.000000,0.000000,1.000000
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5041,-0.094202,-0.995553,0.000000,0.000000,0.000000,1.000000
*Orientation, name=Ori-2, system=RECTANGULAR, local directions=1
Ori-2-DiscOrient
3, 0.
1.000000,0.000000,0.0
*Distribution, name=Ori-3-DiscOrient, location=ELEMENT, Table=Ori-3-DiscOrient_Table
,           1.,           0.,           0.,           0.,           1.,           0.
5042,0.799755,0.600327,-0.000000,0.000000,0.000000,1.000000
5043,0.804271,0.594263,-0.000000,0.000000,0.000000,1.000000
5044,0.805552,0.592526,-0.000000,0.000000,0.000000,1.000000
5045,0.834130,0.551567,-0.000000,0.000000,0.000000,1.000000
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6850,0.973831,0.227271,-0.000000,0.000000,0.000000,1.000000
*Orientation, name=Ori-3, system=RECTANGULAR, local directions=1
Ori-3-DiscOrient
3, 0.
1.000000,0.000000,0.0
*Shell Section, elset=Septal_Leaflet_Elements,  orientation=Ori-3, material=VUANISO_ISO_Septal_Leaflet
.65,5
*Shell Section, elset=Posterior_Leaflet_Elements, orientation=Ori-1, material=VUANISO_ISO_Posterior_Leaflet
.65,5
*Shell Section, elset=Anterior_Leaflet_Elements,  orientation=Ori-2, material=VUANISO_ISO_Anterior_Leaflet
.65,5
*Solid Section, elset=Anterior_Chordae, material=Anterior_Chordae
0.35634654,
*Solid Section, elset=Posterior_Chordae, material=Posterior_Chordae
0.330046348,
*Solid Section, elset=Septal_Chordae, material=Septal_Chordae
0.269284347,
*End Part
*Assembly, name=Valve_Assembly
*Instance, name=Leaflet_Instance, part=Leaflet
*End Instance
*Surface, type=ELEMENT, name=Leaflet_Surfaces, MAXRATIO=0.6
Leaflet_Instance.Anterior_Leaflet_Elements, SPOS
Leaflet_Instance.Posterior_Leaflet_Elements, SPOS
Leaflet_Instance.Septal_Leaflet_Elements, SPOS
*End Assembly
*Distribution Table, name=Ori-1-DiscOrient_Table
coord3D, coord3D
*Distribution Table, name=Ori-3-DiscOrient_Table
coord3D, coord3D
*Distribution Table, name=Ori-2-DiscOrient_Table
coord3D, coord3D
*Amplitude, name=Amp-1, definition=SMOOTH STEP
0.,  0.,  1.,  1.
*Material, name=Anterior_Chordae
*Density
1e-9
*Hyperelastic, OGDEN, N=3
18.884147787615671,  98.253655062498183,  22.682992286286954, 98.251894443391549,  19.502933935159177,  98.253228660027887, 3.2760e-05, 0
  0.,
*Material, name=Posterior_Chordae
*Density
1e-9
*Hyperelastic, OGDEN, N=3
4.241553984852658,  55.914887194545429,   2.724796146859668, 55.915477229563507,   0.000037265674134,  70.715073154655229, 2.8719e-04, 0
  0.,
*Material, name=Septal_Chordae
*Density
1e-9
*Hyperelastic, OGDEN, N=3
33.7534784879460, 0.0001531670654, 0.0000145962860, 0.0003488130193, 0.0203430173299,   113.4473866780919, 5.9237e-05, 0
  0.,
*Material, name=VUANISO_ISO_Anterior_Leaflet
*Density
1e-09,
*anisotropic hyperelastic, user,formulation=invariant, local directions=1, type=compressible, properties=4
0.001000, 20.066890, 0.000124, 4.568202
*TRANSVERSE SHEAR
5.000000e-03,5.000000e-03,0.0
*Material, name=VUANISO_ISO_Posterior_Leaflet
*Density
1e-09,
*anisotropic hyperelastic, user,formulation=invariant, local directions=1, type=compressible, properties=4
0.001000, 20.066890, 0.000188, 14.859590
*TRANSVERSE SHEAR
5.000000e-03,5.000000e-03,0.0
*Material, name=VUANISO_ISO_Septal_Leaflet
*Density
1e-09,
*anisotropic hyperelastic, user,formulation=invariant, local directions=1, type=compressible, properties=4
0.001000, 20.066890, 0.000191, 17.751490
*TRANSVERSE SHEAR
5.000000e-03,5.000000e-03,0.0
*Surface Interaction, name=Interaction_Property
1.,
*Friction
0.01,
*Surface Behavior, pressure-overclosure=linear
0.5
*Step, name="Annulus Approximation", nlgeom=YES
*Dynamic, Explicit
, 1.
*Bulk Viscosity
5, 1.2
*VARIABLE MASS SCALING, TYPE=UNIFORM, FREQUENCY=100, DT=5e-7
*VARIABLE MASS SCALING, TYPE=UNIFORM, ELSET=LEAFLET_INSTANCE.LEAFLET_ELEMENTS, FREQUENCY=100, DT=5e-7
*VARIABLE MASS SCALING, TYPE=BELOW MIN, ELSET=LEAFLET_INSTANCE.Chordae_Elements, FREQUENCY=100, DT=1e-6
*Boundary,op=NEW,amplitude=Amp-1
Leaflet_Instance.1,1,1,-0.564805
Leaflet_Instance.1,2,2,0.855493
Leaflet_Instance.1,3,3,0.034586
*Boundary,op=NEW,amplitude=Amp-1
Leaflet_Instance.2,1,1,-0.641906
Leaflet_Instance.2,2,2,-0.348880
Leaflet_Instance.2,3,3,0.013224
*Boundary,op=NEW,amplitude=Amp-1
Leaflet_Instance.3,1,1,-0.599537
Leaflet_Instance.3,2,2,0.850605
Leaflet_Instance.3,3,3,0.053830
*Boundary,op=NEW,amplitude=Amp-1
Leaflet_Instance.4,1,1,-0.668044
Leaflet_Instance.4,2,2,0.837079
Leaflet_Instance.4,3,3,0.094093
*Boundary,op=NEW,amplitude=Amp-1
Leaflet_Instance.5,1,1,-0.668044
Leaflet_Instance.5,2,2,0.837079
Leaflet_Instance.5,3,3,0.094093
*Boundary,op=NEW,amplitude=Amp-1
Leaflet_Instance.6,1,1,-0.734365
Leaflet_Instance.6,2,2,0.816344
Leaflet_Instance.6,3,3,0.137375
*Boundary,op=NEW,amplitude=Amp-1
Leaflet_Instance.7,1,1,-0.734365
Leaflet_Instance.7,2,2,0.816344
Leaflet_Instance.7,3,3,0.137375
*Boundary,op=NEW,amplitude=Amp-1
Leaflet_Instance.8,1,1,-0.798063
Leaflet_Instance.8,2,2,0.788904
Leaflet_Instance.8,3,3,0.182702
*Boundary,op=NEW,amplitude=Amp-1
Leaflet_Instance.9,1,1,-0.798063
Leaflet_Instance.9,2,2,0.788904
Leaflet_Instance.9,3,3,0.182702
*Boundary,op=NEW,amplitude=Amp-1
Leaflet_Instance.10,1,1,-0.858560
Leaflet_Instance.10,2,2,0.755271
Leaflet_Instance.10,3,3,0.229034
*Boundary,op=NEW,amplitude=Amp-1
Leaflet_Instance.11,1,1,-0.858560
Leaflet_Instance.11,2,2,0.755271
Leaflet_Instance.11,3,3,0.229034
*Boundary,op=NEW,amplitude=Amp-1
Leaflet_Instance.12,1,1,-0.915057
Leaflet_Instance.12,2,2,0.716077
Leaflet_Instance.12,3,3,0.275158
*Boundary,op=NEW,amplitude=Amp-1
Leaflet_Instance.13,1,1,-0.915057
Leaflet_Instance.13,2,2,0.716077
Leaflet_Instance.13,3,3,0.275158
*Boundary,op=NEW,amplitude=Amp-1
Leaflet_Instance.14,1,1,-0.966976
Leaflet_Instance.14,2,2,0.671824
Leaflet_Instance.14,3,3,0.320034
*Boundary,op=NEW,amplitude=Amp-1
Leaflet_Instance.15,1,1,-0.966976
Leaflet_Instance.15,2,2,0.671824
Leaflet_Instance.15,3,3,0.320034
*Boundary,op=NEW,amplitude=Amp-1
Leaflet_Instance.16,1,1,-1.013724
Leaflet_Instance.16,2,2,0.623026
Leaflet_Instance.16,3,3,0.362610
*Boundary,op=NEW,amplitude=Amp-1
Leaflet_Instance.17,1,1,-1.013724
Leaflet_Instance.17,2,2,0.623026
Leaflet_Instance.17,3,3,0.362610
*Boundary,op=NEW,amplitude=Amp-1
Leaflet_Instance.18,1,1,-1.054598
Leaflet_Instance.18,2,2,0.570275
Leaflet_Instance.18,3,3,0.401742
*Boundary,op=NEW,amplitude=Amp-1
Leaflet_Instance.19,1,1,-1.054598
Leaflet_Instance.19,2,2,0.570275
Leaflet_Instance.19,3,3,0.401742
*Boundary,op=NEW,amplitude=Amp-1
Leaflet_Instance.20,1,1,-1.088969
Leaflet_Instance.20,2,2,0.514113
Leaflet_Instance.20,3,3,0.436347
*Boundary,op=NEW,amplitude=Amp-1
Leaflet_Instance.21,1,1,-1.088969
Leaflet_Instance.21,2,2,0.514113
Leaflet_Instance.21,3,3,0.436347
*Boundary,op=NEW,amplitude=Amp-1
Leaflet_Instance.22,1,1,-1.116197
Leaflet_Instance.22,2,2,0.455083
Leaflet_Instance.22,3,3,0.465333
*Boundary,op=NEW,amplitude=Amp-1
Leaflet_Instance.23,1,1,-1.116197
Leaflet_Instance.23,2,2,0.455083
Leaflet_Instance.23,3,3,0.465333
*Boundary,op=NEW,amplitude=Amp-1
Leaflet_Instance.24,1,1,-1.135641
Leaflet_Instance.24,2,2,0.393731
Leaflet_Instance.24,3,3,0.487612
*Boundary,op=NEW,amplitude=Amp-1
Leaflet_Instance.25,1,1,-1.135641
Leaflet_Instance.25,2,2,0.393731
Leaflet_Instance.25,3,3,0.487612
*Boundary,op=NEW,amplitude=Amp-1
Leaflet_Instance.26,1,1,-1.146659
Leaflet_Instance.26,2,2,0.330614
Leaflet_Instance.26,3,3,0.502086
*Boundary,op=NEW,amplitude=Amp-1
Leaflet_Instance.27,1,1,-1.146659
Leaflet_Instance.27,2,2,0.330614
Leaflet_Instance.27,3,3,0.502086
*Boundary,op=NEW,amplitude=Amp-1
Leaflet_Instance.28,1,1,-1.148610
Leaflet_Instance.28,2,2,0.266264
Leaflet_Instance.28,3,3,0.507667
*Boundary,op=NEW,amplitude=Amp-1
Leaflet_Instance.29,1,1,-1.148610
Leaflet_Instance.29,2,2,0.266264
Leaflet_Instance.29,3,3,0.507667
*Boundary,op=NEW,amplitude=Amp-1
Leaflet_Instance.30,1,1,-1.140928
Leaflet_Instance.30,2,2,0.201283
Leaflet_Instance.30,3,3,0.503287
*Boundary,op=NEW,amplitude=Amp-1
Leaflet_Instance.31,1,1,-1.140928
Leaflet_Instance.31,2,2,0.201283
Leaflet_Instance.31,3,3,0.503287
*Boundary,op=NEW,amplitude=Amp-1
Leaflet_Instance.32,1,1,-1.123574
Leaflet_Instance.32,2,2,0.136322
Leaflet_Instance.32,3,3,0.488565
*Boundary,op=NEW,amplitude=Amp-1
Leaflet_Instance.33,1,1,-1.123574
Leaflet_Instance.33,2,2,0.136322
Leaflet_Instance.33,3,3,0.488565
*Boundary,op=NEW,amplitude=Amp-1
Leaflet_Instance.34,1,1,-1.097107
Leaflet_Instance.34,2,2,0.071995
Leaflet_Instance.34,3,3,0.464044
*Boundary,op=NEW,amplitude=Amp-1
Leaflet_Instance.35,1,1,-1.097107
Leaflet_Instance.35,2,2,0.071995
Leaflet_Instance.35,3,3,0.464044
*Boundary,op=NEW,amplitude=Amp-1
Leaflet_Instance.36,1,1,-1.062234
Leaflet_Instance.36,2,2,0.008897
Leaflet_Instance.36,3,3,0.430543
*Boundary,op=NEW,amplitude=Amp-1
Leaflet_Instance.37,1,1,-1.062234
Leaflet_Instance.37,2,2,0.008897
Leaflet_Instance.37,3,3,0.430543
*Boundary,op=NEW,amplitude=Amp-1
Leaflet_Instance.38,1,1,-1.019659
Leaflet_Instance.38,2,2,-0.052383
Leaflet_Instance.38,3,3,0.388879
*Boundary,op=NEW,amplitude=Amp-1
Leaflet_Instance.39,1,1,-1.019659
Leaflet_Instance.39,2,2,-0.052383
Leaflet_Instance.39,3,3,0.388879
*Boundary,op=NEW,amplitude=Amp-1
Leaflet_Instance.40,1,1,-0.970086
Leaflet_Instance.40,2,2,-0.111256
Leaflet_Instance.40,3,3,0.339869
*Boundary,op=NEW,amplitude=Amp-1
Leaflet_Instance.41,1,1,-0.914219
Leaflet_Instance.41,2,2,-0.167133
Leaflet_Instance.41,3,3,0.284328
*Boundary,op=NEW,amplitude=Amp-1
Leaflet_Instance.42,1,1,-0.914219
Leaflet_Instance.42,2,2,-0.167133
Leaflet_Instance.42,3,3,0.284328
*Boundary,op=NEW,amplitude=Amp-1
Leaflet_Instance.43,1,1,-0.852763
Leaflet_Instance.43,2,2,-0.219424
Leaflet_Instance.43,3,3,0.223077
*Boundary,op=NEW,amplitude=Amp-1
Leaflet_Instance.44,1,1,-0.852763
Leaflet_Instance.44,2,2,-0.219424
Leaflet_Instance.44,3,3,0.223077
*Boundary,op=NEW,amplitude=Amp-1
Leaflet_Instance.45,1,1,-0.786425
Leaflet_Instance.45,2,2,-0.267536
Leaflet_Instance.45,3,3,0.156934
*Boundary,op=NEW,amplitude=Amp-1
Leaflet_Instance.46,1,1,-0.786425
Leaflet_Instance.46,2,2,-0.267536
Leaflet_Instance.46,3,3,0.156934
*Boundary,op=NEW,amplitude=Amp-1
Leaflet_Instance.47,1,1,-0.715904
Leaflet_Instance.47,2,2,-0.310885
Leaflet_Instance.47,3,3,0.086709
*Boundary,op=NEW,amplitude=Amp-1
Leaflet_Instance.48,1,1,-0.715904
Leaflet_Instance.48,2,2,-0.310885
Leaflet_Instance.48,3,3,0.086709
*Boundary,op=NEW,amplitude=Amp-1
Leaflet_Instance.49,1,1,-0.641906
Leaflet_Instance.49,2,2,-0.348880
Leaflet_Instance.49,3,3,0.013224
*Boundary,op=NEW,amplitude=Amp-1
Leaflet_Instance.1521,1,1,0.002038
Leaflet_Instance.1521,2,2,-0.001880
Leaflet_Instance.1521,3,3,0.028201
*Boundary,op=NEW,amplitude=Amp-1
Leaflet_Instance.1522,1,1,-0.574208
Leaflet_Instance.1522,2,2,-0.347512
Leaflet_Instance.1522,3,3,-0.068843
*Boundary,op=NEW,amplitude=Amp-1
Leaflet_Instance.1523,1,1,-0.574208
Leaflet_Instance.1523,2,2,-0.347512
Leaflet_Instance.1523,3,3,-0.068843
*Boundary,op=NEW,amplitude=Amp-1
Leaflet_Instance.1524,1,1,-0.521010
Leaflet_Instance.1524,2,2,-0.308411
Leaflet_Instance.1524,3,3,-0.157946
*Boundary,op=NEW,amplitude=Amp-1
Leaflet_Instance.1525,1,1,-0.521010
Leaflet_Instance.1525,2,2,-0.308411
Leaflet_Instance.1525,3,3,-0.157946
*Boundary,op=NEW,amplitude=Amp-1
Leaflet_Instance.1526,1,1,-0.521010
Leaflet_Instance.1526,2,2,-0.308411
Leaflet_Instance.1526,3,3,-0.157946
*Boundary,op=NEW,amplitude=Amp-1
Leaflet_Instance.1527,1,1,-0.480611
Leaflet_Instance.1527,2,2,-0.267050
Leaflet_Instance.1527,3,3,-0.246563
*Boundary,op=NEW,amplitude=Amp-1
Leaflet_Instance.1528,1,1,-0.480611
Leaflet_Instance.1528,2,2,-0.267050
Leaflet_Instance.1528,3,3,-0.246563
*Boundary,op=NEW,amplitude=Amp-1
Leaflet_Instance.1529,1,1,-0.452044
Leaflet_Instance.1529,2,2,-0.223690
Leaflet_Instance.1529,3,3,-0.334207
*Boundary,op=NEW,amplitude=Amp-1
Leaflet_Instance.1530,1,1,-0.452044
Leaflet_Instance.1530,2,2,-0.223690
Leaflet_Instance.1530,3,3,-0.334207
*Boundary,op=NEW,amplitude=Amp-1
Leaflet_Instance.1531,1,1,-0.452044
Leaflet_Instance.1531,2,2,-0.223690
Leaflet_Instance.1531,3,3,-0.334207
*Boundary,op=NEW,amplitude=Amp-1
Leaflet_Instance.1532,1,1,-0.434345
Leaflet_Instance.1532,2,2,-0.178601
Leaflet_Instance.1532,3,3,-0.420379
*Boundary,op=NEW,amplitude=Amp-1
Leaflet_Instance.1533,1,1,-0.434345
Leaflet_Instance.1533,2,2,-0.178601
Leaflet_Instance.1533,3,3,-0.420379
*Boundary,op=NEW,amplitude=Amp-1
Leaflet_Instance.1534,1,1,-0.426549
Leaflet_Instance.1534,2,2,-0.132053
Leaflet_Instance.1534,3,3,-0.504574
*Boundary,op=NEW,amplitude=Amp-1
Leaflet_Instance.1535,1,1,-0.426549
Leaflet_Instance.1535,2,2,-0.132053
Leaflet_Instance.1535,3,3,-0.504574
*Boundary,op=NEW,amplitude=Amp-1
Leaflet_Instance.1536,1,1,-0.426549
Leaflet_Instance.1536,2,2,-0.132053
Leaflet_Instance.1536,3,3,-0.504574
*Boundary,op=NEW,amplitude=Amp-1
Leaflet_Instance.1537,1,1,-0.427691
Leaflet_Instance.1537,2,2,-0.084301
Leaflet_Instance.1537,3,3,-0.586318
*Boundary,op=NEW,amplitude=Amp-1
Leaflet_Instance.1538,1,1,-0.427691
Leaflet_Instance.1538,2,2,-0.084301
Leaflet_Instance.1538,3,3,-0.586318
*Boundary,op=NEW,amplitude=Amp-1
Leaflet_Instance.1539,1,1,-0.427691
Leaflet_Instance.1539,2,2,-0.084301
Leaflet_Instance.1539,3,3,-0.586318
*Boundary,op=NEW,amplitude=Amp-1
Leaflet_Instance.1540,1,1,-0.436804
Leaflet_Instance.1540,2,2,-0.035612
Leaflet_Instance.1540,3,3,-0.665115
*Boundary,op=NEW,amplitude=Amp-1
Leaflet_Instance.1541,1,1,-0.436804
Leaflet_Instance.1541,2,2,-0.035612
Leaflet_Instance.1541,3,3,-0.665115
*Boundary,op=NEW,amplitude=Amp-1
Leaflet_Instance.1542,1,1,-0.436804
Leaflet_Instance.1542,2,2,-0.035612
Leaflet_Instance.1542,3,3,-0.665115
*Boundary,op=NEW,amplitude=Amp-1
Leaflet_Instance.1543,1,1,-0.452923
Leaflet_Instance.1543,2,2,0.013741
Leaflet_Instance.1543,3,3,-0.740458
*Boundary,op=NEW,amplitude=Amp-1
Leaflet_Instance.1544,1,1,-0.452923
Leaflet_Instance.1544,2,2,0.013741
Leaflet_Instance.1544,3,3,-0.740458
*Boundary,op=NEW,amplitude=Amp-1
Leaflet_Instance.1545,1,1,-0.452923
Leaflet_Instance.1545,2,2,0.013741
Leaflet_Instance.1545,3,3,-0.740458
*Boundary,op=NEW,amplitude=Amp-1
Leaflet_Instance.1546,1,1,-0.475085
Leaflet_Instance.1546,2,2,0.063501
Leaflet_Instance.1546,3,3,-0.811865
*Boundary,op=NEW,amplitude=Amp-1
Leaflet_Instance.1547,1,1,-0.475085
Leaflet_Instance.1547,2,2,0.063501
Leaflet_Instance.1547,3,3,-0.811865
*Boundary,op=NEW,amplitude=Amp-1
Leaflet_Instance.1548,1,1,-0.475085
Leaflet_Instance.1548,2,2,0.063501
Leaflet_Instance.1548,3,3,-0.811865
*Boundary,op=NEW,amplitude=Amp-1
Leaflet_Instance.1549,1,1,-0.502324
Leaflet_Instance.1549,2,2,0.113399
Leaflet_Instance.1549,3,3,-0.878840
*Boundary,op=NEW,amplitude=Amp-1
Leaflet_Instance.1550,1,1,-0.502324
Leaflet_Instance.1550,2,2,0.113399
Leaflet_Instance.1550,3,3,-0.878840
*Boundary,op=NEW,amplitude=Amp-1
Leaflet_Instance.1551,1,1,-0.502324
Leaflet_Instance.1551,2,2,0.113399
Leaflet_Instance.1551,3,3,-0.878840
*Boundary,op=NEW,amplitude=Amp-1
Leaflet_Instance.1552,1,1,-0.533673
Leaflet_Instance.1552,2,2,0.163169
Leaflet_Instance.1552,3,3,-0.940885
*Boundary,op=NEW,amplitude=Amp-1
Leaflet_Instance.1553,1,1,-0.533673
Leaflet_Instance.1553,2,2,0.163169
Leaflet_Instance.1553,3,3,-0.940885
*Boundary,op=NEW,amplitude=Amp-1
Leaflet_Instance.1554,1,1,-0.533673
Leaflet_Instance.1554,2,2,0.163169
Leaflet_Instance.1554,3,3,-0.940885
*Boundary,op=NEW,amplitude=Amp-1
Leaflet_Instance.1555,1,1,-0.568170
Leaflet_Instance.1555,2,2,0.212550
Leaflet_Instance.1555,3,3,-0.997513
*Boundary,op=NEW,amplitude=Amp-1
Leaflet_Instance.1556,1,1,-0.568170
Leaflet_Instance.1556,2,2,0.212550
Leaflet_Instance.1556,3,3,-0.997513
*Boundary,op=NEW,amplitude=Amp-1
Leaflet_Instance.1557,1,1,-0.568170
Leaflet_Instance.1557,2,2,0.212550
Leaflet_Instance.1557,3,3,-0.997513
*Boundary,op=NEW,amplitude=Amp-1
Leaflet_Instance.1558,1,1,-0.604846
Leaflet_Instance.1558,2,2,0.261270
Leaflet_Instance.1558,3,3,-1.048224
*Boundary,op=NEW,amplitude=Amp-1
Leaflet_Instance.1559,1,1,-0.604846
Leaflet_Instance.1559,2,2,0.261270
Leaflet_Instance.1559,3,3,-1.048224
*Boundary,op=NEW,amplitude=Amp-1
Leaflet_Instance.1560,1,1,-0.604846
Leaflet_Instance.1560,2,2,0.261270
Leaflet_Instance.1560,3,3,-1.048224
*Boundary,op=NEW,amplitude=Amp-1
Leaflet_Instance.1561,1,1,-0.642736
Leaflet_Instance.1561,2,2,0.309066
Leaflet_Instance.1561,3,3,-1.092525
*Boundary,op=NEW,amplitude=Amp-1
Leaflet_Instance.1562,1,1,-0.642736
Leaflet_Instance.1562,2,2,0.309066
Leaflet_Instance.1562,3,3,-1.092525
*Boundary,op=NEW,amplitude=Amp-1
Leaflet_Instance.1563,1,1,-0.642736
Leaflet_Instance.1563,2,2,0.309066
Leaflet_Instance.1563,3,3,-1.092525
*Boundary,op=NEW,amplitude=Amp-1
Leaflet_Instance.1564,1,1,-0.680881
Leaflet_Instance.1564,2,2,0.355678
Leaflet_Instance.1564,3,3,-1.129928
*Boundary,op=NEW,amplitude=Amp-1
Leaflet_Instance.1565,1,1,-0.680881
Leaflet_Instance.1565,2,2,0.355678
Leaflet_Instance.1565,3,3,-1.129928
*Boundary,op=NEW,amplitude=Amp-1
Leaflet_Instance.1566,1,1,-0.680881
Leaflet_Instance.1566,2,2,0.355678
Leaflet_Instance.1566,3,3,-1.129928
*Boundary,op=NEW,amplitude=Amp-1
Leaflet_Instance.1567,1,1,-0.718309
Leaflet_Instance.1567,2,2,0.400835
Leaflet_Instance.1567,3,3,-1.159935
*Boundary,op=NEW,amplitude=Amp-1
Leaflet_Instance.1568,1,1,-0.718309
Leaflet_Instance.1568,2,2,0.400835
Leaflet_Instance.1568,3,3,-1.159935
*Boundary,op=NEW,amplitude=Amp-1
Leaflet_Instance.1569,1,1,-0.718309
Leaflet_Instance.1569,2,2,0.400835
Leaflet_Instance.1569,3,3,-1.159935
*Boundary,op=NEW,amplitude=Amp-1
Leaflet_Instance.1570,1,1,-0.754055
Leaflet_Instance.1570,2,2,0.444271
Leaflet_Instance.1570,3,3,-1.182051
*Boundary,op=NEW,amplitude=Amp-1
Leaflet_Instance.1571,1,1,-0.754055
Leaflet_Instance.1571,2,2,0.444271
Leaflet_Instance.1571,3,3,-1.182051
*Boundary,op=NEW,amplitude=Amp-1
Leaflet_Instance.1572,1,1,-0.754055
Leaflet_Instance.1572,2,2,0.444271
Leaflet_Instance.1572,3,3,-1.182051
*Boundary,op=NEW,amplitude=Amp-1
Leaflet_Instance.1573,1,1,-0.787159
Leaflet_Instance.1573,2,2,0.485726
Leaflet_Instance.1573,3,3,-1.195787
*Boundary,op=NEW,amplitude=Amp-1
Leaflet_Instance.1574,1,1,-0.787159
Leaflet_Instance.1574,2,2,0.485726
Leaflet_Instance.1574,3,3,-1.195787
*Boundary,op=NEW,amplitude=Amp-1
Leaflet_Instance.1575,1,1,-0.787159
Leaflet_Instance.1575,2,2,0.485726
Leaflet_Instance.1575,3,3,-1.195787
*Boundary,op=NEW,amplitude=Amp-1
Leaflet_Instance.1576,1,1,-0.816652
Leaflet_Instance.1576,2,2,0.524931
Leaflet_Instance.1576,3,3,-1.200647
*Boundary,op=NEW,amplitude=Amp-1
Leaflet_Instance.1577,1,1,-0.816652
Leaflet_Instance.1577,2,2,0.524931
Leaflet_Instance.1577,3,3,-1.200647
*Boundary,op=NEW,amplitude=Amp-1
Leaflet_Instance.1578,1,1,-0.816652
Leaflet_Instance.1578,2,2,0.524931
Leaflet_Instance.1578,3,3,-1.200647
*Boundary,op=NEW,amplitude=Amp-1
Leaflet_Instance.1579,1,1,-0.841570
Leaflet_Instance.1579,2,2,0.561621
Leaflet_Instance.1579,3,3,-1.196138
*Boundary,op=NEW,amplitude=Amp-1
Leaflet_Instance.1580,1,1,-0.841570
Leaflet_Instance.1580,2,2,0.561621
Leaflet_Instance.1580,3,3,-1.196138
*Boundary,op=NEW,amplitude=Amp-1
Leaflet_Instance.1581,1,1,-0.841570
Leaflet_Instance.1581,2,2,0.561621
Leaflet_Instance.1581,3,3,-1.196138
*Boundary,op=NEW,amplitude=Amp-1
Leaflet_Instance.1582,1,1,-0.860467
Leaflet_Instance.1582,2,2,0.594602
Leaflet_Instance.1582,3,3,-1.182660
*Boundary,op=NEW,amplitude=Amp-1
Leaflet_Instance.1583,1,1,-0.860467
Leaflet_Instance.1583,2,2,0.594602
Leaflet_Instance.1583,3,3,-1.182660
*Boundary,op=NEW,amplitude=Amp-1
Leaflet_Instance.1584,1,1,-0.860467
Leaflet_Instance.1584,2,2,0.594602
Leaflet_Instance.1584,3,3,-1.182660
*Boundary,op=NEW,amplitude=Amp-1
Leaflet_Instance.1585,1,1,-0.870970
Leaflet_Instance.1585,2,2,0.620468
Leaflet_Instance.1585,3,3,-1.163010
*Boundary,op=NEW,amplitude=Amp-1
Leaflet_Instance.1586,1,1,-0.870970
Leaflet_Instance.1586,2,2,0.620468
Leaflet_Instance.1586,3,3,-1.163010
*Boundary,op=NEW,amplitude=Amp-1
Leaflet_Instance.1587,1,1,-0.870970
Leaflet_Instance.1587,2,2,0.620468
Leaflet_Instance.1587,3,3,-1.163010
*Boundary,op=NEW,amplitude=Amp-1
Leaflet_Instance.1588,1,1,-0.871876
Leaflet_Instance.1588,2,2,0.636946
Leaflet_Instance.1588,3,3,-1.139624
*Boundary,op=NEW,amplitude=Amp-1
Leaflet_Instance.1589,1,1,-0.871876
Leaflet_Instance.1589,2,2,0.636946
Leaflet_Instance.1589,3,3,-1.139624
*Boundary,op=NEW,amplitude=Amp-1
Leaflet_Instance.1590,1,1,-0.871876
Leaflet_Instance.1590,2,2,0.636946
Leaflet_Instance.1590,3,3,-1.139624
*Boundary,op=NEW,amplitude=Amp-1
Leaflet_Instance.1591,1,1,-0.863781
Leaflet_Instance.1591,2,2,0.644462
Leaflet_Instance.1591,3,3,-1.112845
*Boundary,op=NEW,amplitude=Amp-1
Leaflet_Instance.1592,1,1,-0.863781
Leaflet_Instance.1592,2,2,0.644462
Leaflet_Instance.1592,3,3,-1.112845
*Boundary,op=NEW,amplitude=Amp-1
Leaflet_Instance.1593,1,1,-0.863781
Leaflet_Instance.1593,2,2,0.644462
Leaflet_Instance.1593,3,3,-1.112845
*Boundary,op=NEW,amplitude=Amp-1
Leaflet_Instance.1594,1,1,-0.847464
Leaflet_Instance.1594,2,2,0.643728
Leaflet_Instance.1594,3,3,-1.082786
*Boundary,op=NEW,amplitude=Amp-1
Leaflet_Instance.1595,1,1,-0.847464
Leaflet_Instance.1595,2,2,0.643728
Leaflet_Instance.1595,3,3,-1.082786
*Boundary,op=NEW,amplitude=Amp-1
Leaflet_Instance.1596,1,1,-0.847464
Leaflet_Instance.1596,2,2,0.643728
Leaflet_Instance.1596,3,3,-1.082786
*Boundary,op=NEW,amplitude=Amp-1
Leaflet_Instance.1597,1,1,-0.823702
Leaflet_Instance.1597,2,2,0.635456
Leaflet_Instance.1597,3,3,-1.049557
*Boundary,op=NEW,amplitude=Amp-1
Leaflet_Instance.1598,1,1,-0.823702
Leaflet_Instance.1598,2,2,0.635456
Leaflet_Instance.1598,3,3,-1.049557
*Boundary,op=NEW,amplitude=Amp-1
Leaflet_Instance.1599,1,1,-0.823702
Leaflet_Instance.1599,2,2,0.635456
Leaflet_Instance.1599,3,3,-1.049557
*Boundary,op=NEW,amplitude=Amp-1
Leaflet_Instance.1600,1,1,-0.793273
Leaflet_Instance.1600,2,2,0.620358
Leaflet_Instance.1600,3,3,-1.013266
*Boundary,op=NEW,amplitude=Amp-1
Leaflet_Instance.1601,1,1,-0.793273
Leaflet_Instance.1601,2,2,0.620358
Leaflet_Instance.1601,3,3,-1.013266
*Boundary,op=NEW,amplitude=Amp-1
Leaflet_Instance.1602,1,1,-0.793273
Leaflet_Instance.1602,2,2,0.620358
Leaflet_Instance.1602,3,3,-1.013266
*Boundary,op=NEW,amplitude=Amp-1
Leaflet_Instance.1603,1,1,-0.756958
Leaflet_Instance.1603,2,2,0.599147
Leaflet_Instance.1603,3,3,-0.974028
*Boundary,op=NEW,amplitude=Amp-1
Leaflet_Instance.1604,1,1,-0.756958
Leaflet_Instance.1604,2,2,0.599147
Leaflet_Instance.1604,3,3,-0.974028
*Boundary,op=NEW,amplitude=Amp-1
Leaflet_Instance.1605,1,1,-0.756958
Leaflet_Instance.1605,2,2,0.599147
Leaflet_Instance.1605,3,3,-0.974028
*Boundary,op=NEW,amplitude=Amp-1
Leaflet_Instance.1606,1,1,-0.756958
Leaflet_Instance.1606,2,2,0.599147
Leaflet_Instance.1606,3,3,-0.974028
*Boundary,op=NEW,amplitude=Amp-1
Leaflet_Instance.1607,1,1,-0.715534
Leaflet_Instance.1607,2,2,0.572536
Leaflet_Instance.1607,3,3,-0.931954
*Boundary,op=NEW,amplitude=Amp-1
Leaflet_Instance.1608,1,1,-0.715534
Leaflet_Instance.1608,2,2,0.572536
Leaflet_Instance.1608,3,3,-0.931954
*Boundary,op=NEW,amplitude=Amp-1
Leaflet_Instance.1609,1,1,-0.715534
Leaflet_Instance.1609,2,2,0.572536
Leaflet_Instance.1609,3,3,-0.931954
*Boundary,op=NEW,amplitude=Amp-1
Leaflet_Instance.1610,1,1,-0.669778
Leaflet_Instance.1610,2,2,0.541234
Leaflet_Instance.1610,3,3,-0.887150
*Boundary,op=NEW,amplitude=Amp-1
Leaflet_Instance.1611,1,1,-0.669778
Leaflet_Instance.1611,2,2,0.541234
Leaflet_Instance.1611,3,3,-0.887150
*Boundary,op=NEW,amplitude=Amp-1
Leaflet_Instance.1612,1,1,-0.669778
Leaflet_Instance.1612,2,2,0.541234
Leaflet_Instance.1612,3,3,-0.887150
*Boundary,op=NEW,amplitude=Amp-1
Leaflet_Instance.1613,1,1,-0.620474
Leaflet_Instance.1613,2,2,0.505959
Leaflet_Instance.1613,3,3,-0.839736
*Boundary,op=NEW,amplitude=Amp-1
Leaflet_Instance.1614,1,1,-0.620474
Leaflet_Instance.1614,2,2,0.505959
Leaflet_Instance.1614,3,3,-0.839736
*Boundary,op=NEW,amplitude=Amp-1
Leaflet_Instance.1615,1,1,-0.620474
Leaflet_Instance.1615,2,2,0.505959
Leaflet_Instance.1615,3,3,-0.839736
*Boundary,op=NEW,amplitude=Amp-1
Leaflet_Instance.1616,1,1,-0.568399
Leaflet_Instance.1616,2,2,0.467421
Leaflet_Instance.1616,3,3,-0.789820
*Boundary,op=NEW,amplitude=Amp-1
Leaflet_Instance.1617,1,1,-0.568399
Leaflet_Instance.1617,2,2,0.467421
Leaflet_Instance.1617,3,3,-0.789820
*Boundary,op=NEW,amplitude=Amp-1
Leaflet_Instance.1618,1,1,-0.568399
Leaflet_Instance.1618,2,2,0.467421
Leaflet_Instance.1618,3,3,-0.789820
*Boundary,op=NEW,amplitude=Amp-1
Leaflet_Instance.1619,1,1,-0.514323
Leaflet_Instance.1619,2,2,0.426328
Leaflet_Instance.1619,3,3,-0.737505
*Boundary,op=NEW,amplitude=Amp-1
Leaflet_Instance.1620,1,1,-0.514323
Leaflet_Instance.1620,2,2,0.426328
Leaflet_Instance.1620,3,3,-0.737505
*Boundary,op=NEW,amplitude=Amp-1
Leaflet_Instance.1621,1,1,-0.514323
Leaflet_Instance.1621,2,2,0.426328
Leaflet_Instance.1621,3,3,-0.737505
*Boundary,op=NEW,amplitude=Amp-1
Leaflet_Instance.1622,1,1,-0.459035
Leaflet_Instance.1622,2,2,0.383397
Leaflet_Instance.1622,3,3,-0.682912
*Boundary,op=NEW,amplitude=Amp-1
Leaflet_Instance.1623,1,1,-0.459035
Leaflet_Instance.1623,2,2,0.383397
Leaflet_Instance.1623,3,3,-0.682912
*Boundary,op=NEW,amplitude=Amp-1
Leaflet_Instance.1624,1,1,-0.459035
Leaflet_Instance.1624,2,2,0.383397
Leaflet_Instance.1624,3,3,-0.682912
*Boundary,op=NEW,amplitude=Amp-1
Leaflet_Instance.1625,1,1,-0.459035
Leaflet_Instance.1625,2,2,0.383397
Leaflet_Instance.1625,3,3,-0.682912
*Boundary,op=NEW,amplitude=Amp-1
Leaflet_Instance.1626,1,1,-0.403314
Leaflet_Instance.1626,2,2,0.339344
Leaflet_Instance.1626,3,3,-0.626152
*Boundary,op=NEW,amplitude=Amp-1
Leaflet_Instance.1627,1,1,-0.403314
Leaflet_Instance.1627,2,2,0.339344
Leaflet_Instance.1627,3,3,-0.626152
*Boundary,op=NEW,amplitude=Amp-1
Leaflet_Instance.1628,1,1,-0.403314
Leaflet_Instance.1628,2,2,0.339344
Leaflet_Instance.1628,3,3,-0.626152
*Boundary,op=NEW,amplitude=Amp-1
Leaflet_Instance.1629,1,1,-0.347929
Leaflet_Instance.1629,2,2,0.294872
Leaflet_Instance.1629,3,3,-0.567329
*Boundary,op=NEW,amplitude=Amp-1
Leaflet_Instance.1630,1,1,-0.347929
Leaflet_Instance.1630,2,2,0.294872
Leaflet_Instance.1630,3,3,-0.567329
*Boundary,op=NEW,amplitude=Amp-1
Leaflet_Instance.1631,1,1,-0.293662
Leaflet_Instance.1631,2,2,0.250696
Leaflet_Instance.1631,3,3,-0.506555
*Boundary,op=NEW,amplitude=Amp-1
Leaflet_Instance.1632,1,1,-0.293662
Leaflet_Instance.1632,2,2,0.250696
Leaflet_Instance.1632,3,3,-0.506555
*Boundary,op=NEW,amplitude=Amp-1
Leaflet_Instance.1633,1,1,-0.293662
Leaflet_Instance.1633,2,2,0.250696
Leaflet_Instance.1633,3,3,-0.506555
*Boundary,op=NEW,amplitude=Amp-1
Leaflet_Instance.1634,1,1,-0.241296
Leaflet_Instance.1634,2,2,0.207532
Leaflet_Instance.1634,3,3,-0.443945
*Boundary,op=NEW,amplitude=Amp-1
Leaflet_Instance.1635,1,1,-0.241296
Leaflet_Instance.1635,2,2,0.207532
Leaflet_Instance.1635,3,3,-0.443945
*Boundary,op=NEW,amplitude=Amp-1
Leaflet_Instance.1636,1,1,-0.241296
Leaflet_Instance.1636,2,2,0.207532
Leaflet_Instance.1636,3,3,-0.443945
*Boundary,op=NEW,amplitude=Amp-1
Leaflet_Instance.1637,1,1,-0.191608
Leaflet_Instance.1637,2,2,0.166092
Leaflet_Instance.1637,3,3,-0.379611
*Boundary,op=NEW,amplitude=Amp-1
Leaflet_Instance.1638,1,1,-0.191608
Leaflet_Instance.1638,2,2,0.166092
Leaflet_Instance.1638,3,3,-0.379611
*Boundary,op=NEW,amplitude=Amp-1
Leaflet_Instance.1639,1,1,-0.191608
Leaflet_Instance.1639,2,2,0.166092
Leaflet_Instance.1639,3,3,-0.379611
*Boundary,op=NEW,amplitude=Amp-1
Leaflet_Instance.1640,1,1,-0.145376
Leaflet_Instance.1640,2,2,0.127087
Leaflet_Instance.1640,3,3,-0.313661
*Boundary,op=NEW,amplitude=Amp-1
Leaflet_Instance.1641,1,1,-0.145376
Leaflet_Instance.1641,2,2,0.127087
Leaflet_Instance.1641,3,3,-0.313661
*Boundary,op=NEW,amplitude=Amp-1
Leaflet_Instance.1642,1,1,-0.103375
Leaflet_Instance.1642,2,2,0.091226
Leaflet_Instance.1642,3,3,-0.246203
*Boundary,op=NEW,amplitude=Amp-1
Leaflet_Instance.1643,1,1,-0.103375
Leaflet_Instance.1643,2,2,0.091226
Leaflet_Instance.1643,3,3,-0.246203
*Boundary,op=NEW,amplitude=Amp-1
Leaflet_Instance.1644,1,1,-0.103375
Leaflet_Instance.1644,2,2,0.091226
Leaflet_Instance.1644,3,3,-0.246203
*Boundary,op=NEW,amplitude=Amp-1
Leaflet_Instance.1645,1,1,-0.066390
Leaflet_Instance.1645,2,2,0.059228
Leaflet_Instance.1645,3,3,-0.177357
*Boundary,op=NEW,amplitude=Amp-1
Leaflet_Instance.1646,1,1,-0.066390
Leaflet_Instance.1646,2,2,0.059228
Leaflet_Instance.1646,3,3,-0.177357
*Boundary,op=NEW,amplitude=Amp-1
Leaflet_Instance.1647,1,1,-0.035190
Leaflet_Instance.1647,2,2,0.031797
Leaflet_Instance.1647,3,3,-0.107210
*Boundary,op=NEW,amplitude=Amp-1
Leaflet_Instance.1648,1,1,-0.035190
Leaflet_Instance.1648,2,2,0.031797
Leaflet_Instance.1648,3,3,-0.107210
*Boundary,op=NEW,amplitude=Amp-1
Leaflet_Instance.1649,1,1,-0.010567
Leaflet_Instance.1649,2,2,0.009655
Leaflet_Instance.1649,3,3,-0.035909
*Boundary,op=NEW,amplitude=Amp-1
Leaflet_Instance.1650,1,1,-0.010567
Leaflet_Instance.1650,2,2,0.009655
Leaflet_Instance.1650,3,3,-0.035909
*Boundary,op=NEW,amplitude=Amp-1
Leaflet_Instance.6720,1,1,0.002038
Leaflet_Instance.6720,2,2,-0.001880
Leaflet_Instance.6720,3,3,0.028201
*Boundary,op=NEW,amplitude=Amp-1
Leaflet_Instance.6721,1,1,0.002038
Leaflet_Instance.6721,2,2,-0.001880
Leaflet_Instance.6721,3,3,0.028201
*Boundary,op=NEW,amplitude=Amp-1
Leaflet_Instance.6722,1,1,0.002744
Leaflet_Instance.6722,2,2,-0.004197
Leaflet_Instance.6722,3,3,0.083700
*Boundary,op=NEW,amplitude=Amp-1
Leaflet_Instance.6723,1,1,0.002744
Leaflet_Instance.6723,2,2,-0.004197
Leaflet_Instance.6723,3,3,0.083700
*Boundary,op=NEW,amplitude=Amp-1
Leaflet_Instance.6724,1,1,-0.002880
Leaflet_Instance.6724,2,2,-0.003592
Leaflet_Instance.6724,3,3,0.137068
*Boundary,op=NEW,amplitude=Amp-1
Leaflet_Instance.6725,1,1,-0.002880
Leaflet_Instance.6725,2,2,-0.003592
Leaflet_Instance.6725,3,3,0.137068
*Boundary,op=NEW,amplitude=Amp-1
Leaflet_Instance.6726,1,1,-0.014010
Leaflet_Instance.6726,2,2,0.000001
Leaflet_Instance.6726,3,3,0.187693
*Boundary,op=NEW,amplitude=Amp-1
Leaflet_Instance.6727,1,1,-0.014010
Leaflet_Instance.6727,2,2,0.000001
Leaflet_Instance.6727,3,3,0.187693
*Boundary,op=NEW,amplitude=Amp-1
Leaflet_Instance.6728,1,1,-0.029816
Leaflet_Instance.6728,2,2,0.006648
Leaflet_Instance.6728,3,3,0.234938
*Boundary,op=NEW,amplitude=Amp-1
Leaflet_Instance.6729,1,1,-0.029816
Leaflet_Instance.6729,2,2,0.006648
Leaflet_Instance.6729,3,3,0.234938
*Boundary,op=NEW,amplitude=Amp-1
Leaflet_Instance.6730,1,1,-0.049466
Leaflet_Instance.6730,2,2,0.016413
Leaflet_Instance.6730,3,3,0.278147
*Boundary,op=NEW,amplitude=Amp-1
Leaflet_Instance.6731,1,1,-0.049466
Leaflet_Instance.6731,2,2,0.016413
Leaflet_Instance.6731,3,3,0.278147
*Boundary,op=NEW,amplitude=Amp-1
Leaflet_Instance.6732,1,1,-0.049466
Leaflet_Instance.6732,2,2,0.016413
Leaflet_Instance.6732,3,3,0.278147
*Boundary,op=NEW,amplitude=Amp-1
Leaflet_Instance.6733,1,1,-0.072133
Leaflet_Instance.6733,2,2,0.029361
Leaflet_Instance.6733,3,3,0.316693
*Boundary,op=NEW,amplitude=Amp-1
Leaflet_Instance.6734,1,1,-0.072133
Leaflet_Instance.6734,2,2,0.029361
Leaflet_Instance.6734,3,3,0.316693
*Boundary,op=NEW,amplitude=Amp-1
Leaflet_Instance.6735,1,1,-0.096989
Leaflet_Instance.6735,2,2,0.045560
Leaflet_Instance.6735,3,3,0.349945
*Boundary,op=NEW,amplitude=Amp-1
Leaflet_Instance.6736,1,1,-0.096989
Leaflet_Instance.6736,2,2,0.045560
Leaflet_Instance.6736,3,3,0.349945
*Boundary,op=NEW,amplitude=Amp-1
Leaflet_Instance.6737,1,1,-0.123206
Leaflet_Instance.6737,2,2,0.065074
Leaflet_Instance.6737,3,3,0.377263
*Boundary,op=NEW,amplitude=Amp-1
Leaflet_Instance.6738,1,1,-0.123206
Leaflet_Instance.6738,2,2,0.065074
Leaflet_Instance.6738,3,3,0.377263
*Boundary,op=NEW,amplitude=Amp-1
Leaflet_Instance.6739,1,1,-0.123206
Leaflet_Instance.6739,2,2,0.065074
Leaflet_Instance.6739,3,3,0.377263
*Boundary,op=NEW,amplitude=Amp-1
Leaflet_Instance.6740,1,1,-0.149950
Leaflet_Instance.6740,2,2,0.087964
Leaflet_Instance.6740,3,3,0.398010
*Boundary,op=NEW,amplitude=Amp-1
Leaflet_Instance.6741,1,1,-0.149950
Leaflet_Instance.6741,2,2,0.087964
Leaflet_Instance.6741,3,3,0.398010
*Boundary,op=NEW,amplitude=Amp-1
Leaflet_Instance.6742,1,1,-0.176399
Leaflet_Instance.6742,2,2,0.114303
Leaflet_Instance.6742,3,3,0.411555
*Boundary,op=NEW,amplitude=Amp-1
Leaflet_Instance.6743,1,1,-0.176399
Leaflet_Instance.6743,2,2,0.114303
Leaflet_Instance.6743,3,3,0.411555
*Boundary,op=NEW,amplitude=Amp-1
Leaflet_Instance.6744,1,1,-0.201729
Leaflet_Instance.6744,2,2,0.144147
Leaflet_Instance.6744,3,3,0.417235
*Boundary,op=NEW,amplitude=Amp-1
Leaflet_Instance.6745,1,1,-0.201729
Leaflet_Instance.6745,2,2,0.144147
Leaflet_Instance.6745,3,3,0.417235
*Boundary,op=NEW,amplitude=Amp-1
Leaflet_Instance.6746,1,1,-0.201729
Leaflet_Instance.6746,2,2,0.144147
Leaflet_Instance.6746,3,3,0.417235
*Boundary,op=NEW,amplitude=Amp-1
Leaflet_Instance.6747,1,1,-0.225381
Leaflet_Instance.6747,2,2,0.177341
Leaflet_Instance.6747,3,3,0.414007
*Boundary,op=NEW,amplitude=Amp-1
Leaflet_Instance.6748,1,1,-0.225381
Leaflet_Instance.6748,2,2,0.177341
Leaflet_Instance.6748,3,3,0.414007
*Boundary,op=NEW,amplitude=Amp-1
Leaflet_Instance.6749,1,1,-0.247345
Leaflet_Instance.6749,2,2,0.213473
Leaflet_Instance.6749,3,3,0.401506
*Boundary,op=NEW,amplitude=Amp-1
Leaflet_Instance.6750,1,1,-0.247345
Leaflet_Instance.6750,2,2,0.213473
Leaflet_Instance.6750,3,3,0.401506
*Boundary,op=NEW,amplitude=Amp-1
Leaflet_Instance.6751,1,1,-0.267873
Leaflet_Instance.6751,2,2,0.252096
Leaflet_Instance.6751,3,3,0.380787
*Boundary,op=NEW,amplitude=Amp-1
Leaflet_Instance.6752,1,1,-0.267873
Leaflet_Instance.6752,2,2,0.252096
Leaflet_Instance.6752,3,3,0.380787
*Boundary,op=NEW,amplitude=Amp-1
Leaflet_Instance.6753,1,1,-0.287235
Leaflet_Instance.6753,2,2,0.292844
Leaflet_Instance.6753,3,3,0.353259
*Boundary,op=NEW,amplitude=Amp-1
Leaflet_Instance.6754,1,1,-0.287235
Leaflet_Instance.6754,2,2,0.292844
Leaflet_Instance.6754,3,3,0.353259
*Boundary,op=NEW,amplitude=Amp-1
Leaflet_Instance.6755,1,1,-0.287235
Leaflet_Instance.6755,2,2,0.292844
Leaflet_Instance.6755,3,3,0.353259
*Boundary,op=NEW,amplitude=Amp-1
Leaflet_Instance.6756,1,1,-0.305689
Leaflet_Instance.6756,2,2,0.335332
Leaflet_Instance.6756,3,3,0.320349
*Boundary,op=NEW,amplitude=Amp-1
Leaflet_Instance.6757,1,1,-0.305689
Leaflet_Instance.6757,2,2,0.335332
Leaflet_Instance.6757,3,3,0.320349
*Boundary,op=NEW,amplitude=Amp-1
Leaflet_Instance.6758,1,1,-0.323484
Leaflet_Instance.6758,2,2,0.379150
Leaflet_Instance.6758,3,3,0.283498
*Boundary,op=NEW,amplitude=Amp-1
Leaflet_Instance.6759,1,1,-0.323484
Leaflet_Instance.6759,2,2,0.379150
Leaflet_Instance.6759,3,3,0.283498
*Boundary,op=NEW,amplitude=Amp-1
Leaflet_Instance.6760,1,1,-0.340892
Leaflet_Instance.6760,2,2,0.423944
Leaflet_Instance.6760,3,3,0.244105
*Boundary,op=NEW,amplitude=Amp-1
Leaflet_Instance.6761,1,1,-0.340892
Leaflet_Instance.6761,2,2,0.423944
Leaflet_Instance.6761,3,3,0.244105
*Boundary,op=NEW,amplitude=Amp-1
Leaflet_Instance.6762,1,1,-0.358162
Leaflet_Instance.6762,2,2,0.469300
Leaflet_Instance.6762,3,3,0.203618
*Boundary,op=NEW,amplitude=Amp-1
Leaflet_Instance.6763,1,1,-0.358162
Leaflet_Instance.6763,2,2,0.469300
Leaflet_Instance.6763,3,3,0.203618
*Boundary,op=NEW,amplitude=Amp-1
Leaflet_Instance.6764,1,1,-0.358162
Leaflet_Instance.6764,2,2,0.469300
Leaflet_Instance.6764,3,3,0.203618
*Boundary,op=NEW,amplitude=Amp-1
Leaflet_Instance.6765,1,1,-0.375557
Leaflet_Instance.6765,2,2,0.514843
Leaflet_Instance.6765,3,3,0.163453
*Boundary,op=NEW,amplitude=Amp-1
Leaflet_Instance.6766,1,1,-0.375557
Leaflet_Instance.6766,2,2,0.514843
Leaflet_Instance.6766,3,3,0.163453
*Boundary,op=NEW,amplitude=Amp-1
Leaflet_Instance.6767,1,1,-0.393344
Leaflet_Instance.6767,2,2,0.560205
Leaflet_Instance.6767,3,3,0.125019
*Boundary,op=NEW,amplitude=Amp-1
Leaflet_Instance.6768,1,1,-0.393344
Leaflet_Instance.6768,2,2,0.560205
Leaflet_Instance.6768,3,3,0.125019
*Boundary,op=NEW,amplitude=Amp-1
Leaflet_Instance.6769,1,1,-0.393344
Leaflet_Instance.6769,2,2,0.560205
Leaflet_Instance.6769,3,3,0.125019
*Boundary,op=NEW,amplitude=Amp-1
Leaflet_Instance.6770,1,1,-0.411770
Leaflet_Instance.6770,2,2,0.604973
Leaflet_Instance.6770,3,3,0.089766
*Boundary,op=NEW,amplitude=Amp-1
Leaflet_Instance.6771,1,1,-0.411770
Leaflet_Instance.6771,2,2,0.604973
Leaflet_Instance.6771,3,3,0.089766
*Boundary,op=NEW,amplitude=Amp-1
Leaflet_Instance.6772,1,1,-0.431088
Leaflet_Instance.6772,2,2,0.648747
Leaflet_Instance.6772,3,3,0.059123
*Boundary,op=NEW,amplitude=Amp-1
Leaflet_Instance.6773,1,1,-0.431088
Leaflet_Instance.6773,2,2,0.648747
Leaflet_Instance.6773,3,3,0.059123
*Boundary,op=NEW,amplitude=Amp-1
Leaflet_Instance.6774,1,1,-0.451575
Leaflet_Instance.6774,2,2,0.691178
Leaflet_Instance.6774,3,3,0.034492
*Boundary,op=NEW,amplitude=Amp-1
Leaflet_Instance.6775,1,1,-0.451575
Leaflet_Instance.6775,2,2,0.691178
Leaflet_Instance.6775,3,3,0.034492
*Boundary,op=NEW,amplitude=Amp-1
Leaflet_Instance.6776,1,1,-0.451575
Leaflet_Instance.6776,2,2,0.691178
Leaflet_Instance.6776,3,3,0.034492
*Boundary,op=NEW,amplitude=Amp-1
Leaflet_Instance.6777,1,1,-0.473493
Leaflet_Instance.6777,2,2,0.731889
Leaflet_Instance.6777,3,3,0.017291
*Boundary,op=NEW,amplitude=Amp-1
Leaflet_Instance.6778,1,1,-0.473493
Leaflet_Instance.6778,2,2,0.731889
Leaflet_Instance.6778,3,3,0.017291
*Boundary,op=NEW,amplitude=Amp-1
Leaflet_Instance.6779,1,1,-0.497073
Leaflet_Instance.6779,2,2,0.770443
Leaflet_Instance.6779,3,3,0.008968
*Boundary,op=NEW,amplitude=Amp-1
Leaflet_Instance.6780,1,1,-0.497073
Leaflet_Instance.6780,2,2,0.770443
Leaflet_Instance.6780,3,3,0.008968
*Boundary,op=NEW,amplitude=Amp-1
Leaflet_Instance.6781,1,1,-0.522596
Leaflet_Instance.6781,2,2,0.806491
Leaflet_Instance.6781,3,3,0.010932
*Boundary,op=NEW,amplitude=Amp-1
Leaflet_Instance.6782,1,1,-0.522596
Leaflet_Instance.6782,2,2,0.806491
Leaflet_Instance.6782,3,3,0.010932
*Boundary,op=NEW,amplitude=Amp-1
Leaflet_Instance.6783,1,1,-0.550342
Leaflet_Instance.6783,2,2,0.839669
Leaflet_Instance.6783,3,3,0.024625
*Boundary,op=NEW,amplitude=Amp-1
Leaflet_Instance.6784,1,1,-0.564805
Leaflet_Instance.6784,2,2,0.855493
Leaflet_Instance.6784,3,3,0.034586
*Boundary,op=NEW,amplitude=Amp-1
Leaflet_Instance.8588,1,1,0.000000
Leaflet_Instance.8588,2,2,0.000000
Leaflet_Instance.8588,3,3,0.000000
*Boundary,op=NEW,amplitude=Amp-1
Leaflet_Instance.8598,1,1,0.000000
Leaflet_Instance.8598,2,2,0.000000
Leaflet_Instance.8598,3,3,0.000000
*Boundary,op=NEW,amplitude=Amp-1
Leaflet_Instance.8608,1,1,0.000000
Leaflet_Instance.8608,2,2,0.000000
Leaflet_Instance.8608,3,3,0.000000
*Boundary,op=NEW,amplitude=Amp-1
Leaflet_Instance.10262,1,1,0.000000
Leaflet_Instance.10262,2,2,0.000000
Leaflet_Instance.10262,3,3,0.000000
*Boundary,op=NEW,amplitude=Amp-1
Leaflet_Instance.10271,1,1,0.000000
Leaflet_Instance.10271,2,2,0.000000
Leaflet_Instance.10271,3,3,0.000000
*Boundary,op=NEW,amplitude=Amp-1
Leaflet_Instance.10280,1,1,0.000000
Leaflet_Instance.10280,2,2,0.000000
Leaflet_Instance.10280,3,3,0.000000
*Boundary,op=NEW,amplitude=Amp-1
Leaflet_Instance.10289,1,1,0.000000
Leaflet_Instance.10289,2,2,0.000000
Leaflet_Instance.10289,3,3,0.000000
*Boundary,op=NEW,amplitude=Amp-1
Leaflet_Instance.10298,1,1,0.000000
Leaflet_Instance.10298,2,2,0.000000
Leaflet_Instance.10298,3,3,0.000000
*Boundary,op=NEW,amplitude=Amp-1
Leaflet_Instance.10307,1,1,0.000000
Leaflet_Instance.10307,2,2,0.000000
Leaflet_Instance.10307,3,3,0.000000
*Boundary,op=NEW,amplitude=Amp-1
Leaflet_Instance.10316,1,1,0.000000
Leaflet_Instance.10316,2,2,0.000000
Leaflet_Instance.10316,3,3,0.000000
*Boundary,op=NEW,amplitude=Amp-1
Leaflet_Instance.10325,1,1,0.000000
Leaflet_Instance.10325,2,2,0.000000
Leaflet_Instance.10325,3,3,0.000000
*Boundary,op=NEW,amplitude=Amp-1
Leaflet_Instance.10334,1,1,0.000000
Leaflet_Instance.10334,2,2,0.000000
Leaflet_Instance.10334,3,3,0.000000
*Boundary,op=NEW,amplitude=Amp-1
Leaflet_Instance.10343,1,1,0.000000
Leaflet_Instance.10343,2,2,0.000000
Leaflet_Instance.10343,3,3,0.000000
*Boundary,op=NEW,amplitude=Amp-1
Leaflet_Instance.10352,1,1,0.000000
Leaflet_Instance.10352,2,2,0.000000
Leaflet_Instance.10352,3,3,0.000000
*Boundary,op=NEW,amplitude=Amp-1
Leaflet_Instance.10361,1,1,0.000000
Leaflet_Instance.10361,2,2,0.000000
Leaflet_Instance.10361,3,3,0.000000
*Boundary,op=NEW,amplitude=Amp-1
Leaflet_Instance.10370,1,1,0.000000
Leaflet_Instance.10370,2,2,0.000000
Leaflet_Instance.10370,3,3,0.000000
*Boundary,op=NEW,amplitude=Amp-1
Leaflet_Instance.10379,1,1,0.000000
Leaflet_Instance.10379,2,2,0.000000
Leaflet_Instance.10379,3,3,0.000000
*Boundary,op=NEW,amplitude=Amp-1
Leaflet_Instance.10388,1,1,0.000000
Leaflet_Instance.10388,2,2,0.000000
Leaflet_Instance.10388,3,3,0.000000
*Boundary,op=NEW,amplitude=Amp-1
Leaflet_Instance.10397,1,1,0.000000
Leaflet_Instance.10397,2,2,0.000000
Leaflet_Instance.10397,3,3,0.000000
*Boundary,op=NEW,amplitude=Amp-1
Leaflet_Instance.10406,1,1,0.000000
Leaflet_Instance.10406,2,2,0.000000
Leaflet_Instance.10406,3,3,0.000000
*Boundary,op=NEW,amplitude=Amp-1
Leaflet_Instance.10415,1,1,0.000000
Leaflet_Instance.10415,2,2,0.000000
Leaflet_Instance.10415,3,3,0.000000
*Boundary,op=NEW,amplitude=Amp-1
Leaflet_Instance.10424,1,1,0.000000
Leaflet_Instance.10424,2,2,0.000000
Leaflet_Instance.10424,3,3,0.000000
*Boundary,op=NEW,amplitude=Amp-1
Leaflet_Instance.10433,1,1,0.000000
Leaflet_Instance.10433,2,2,0.000000
Leaflet_Instance.10433,3,3,0.000000
*Boundary,op=NEW,amplitude=Amp-1
Leaflet_Instance.10442,1,1,0.000000
Leaflet_Instance.10442,2,2,0.000000
Leaflet_Instance.10442,3,3,0.000000
*Boundary,op=NEW,amplitude=Amp-1
Leaflet_Instance.10451,1,1,0.000000
Leaflet_Instance.10451,2,2,0.000000
Leaflet_Instance.10451,3,3,0.000000
*Boundary,op=NEW,amplitude=Amp-1
Leaflet_Instance.10460,1,1,0.000000
Leaflet_Instance.10460,2,2,0.000000
Leaflet_Instance.10460,3,3,0.000000
*Boundary,op=NEW,amplitude=Amp-1
Leaflet_Instance.10469,1,1,0.000000
Leaflet_Instance.10469,2,2,0.000000
Leaflet_Instance.10469,3,3,0.000000
*Boundary,op=NEW,amplitude=Amp-1
Leaflet_Instance.10478,1,1,0.000000
Leaflet_Instance.10478,2,2,0.000000
Leaflet_Instance.10478,3,3,0.000000
*Boundary,op=NEW,amplitude=Amp-1
Leaflet_Instance.10487,1,1,0.000000
Leaflet_Instance.10487,2,2,0.000000
Leaflet_Instance.10487,3,3,0.000000
*Boundary,op=NEW,amplitude=Amp-1
Leaflet_Instance.10496,1,1,0.000000
Leaflet_Instance.10496,2,2,0.000000
Leaflet_Instance.10496,3,3,0.000000
*Boundary,op=NEW,amplitude=Amp-1
Leaflet_Instance.10505,1,1,0.000000
Leaflet_Instance.10505,2,2,0.000000
Leaflet_Instance.10505,3,3,0.000000
*Boundary,op=NEW,amplitude=Amp-1
Leaflet_Instance.10514,1,1,0.000000
Leaflet_Instance.10514,2,2,0.000000
Leaflet_Instance.10514,3,3,0.000000
*Dsload,op=NEW,amplitude=Amp-1
Leaflet_Surfaces, P, 0.003060
*Contact, op=NEW
*Contact Inclusions
LEAFLET_SURFACES,
*Contact Property Assignment
 ,  , INTERACTION_PROPERTY
*Output, field, variable=PRESELECT
*ELEMENT OUTPUT, ELSET=LEAFLET_INSTANCE.LEAFLET_ELEMENTS
1,5
S,LE,STH,COORD
*NODE OUTPUT, NSET=LEAFLET_INSTANCE.LEAFLET_NODES
COORD
*CONTACT OUTPUT
CFORCE,CSTRESS,CTHICK
*Output, history, variable=PRESELECT
*End Step
